# OpenSim document version 30511
Model model_:
  ConsoleReporter__double_ reporter: report_time_interval=1 [s]
      input_inputs_connectee_names=(../calf|fiber_force ../knee/knee_coord_0|value(knee_angle))
  Ground
  BodySet:
    Body upper: mass=1 [kg] mass_center=(0 0 0) inertia=(0 0 0 0 0 0)
      PhysicalOffsetFrame upperCenter: socket_parent_connectee_name=.. translation=(0 0.5 0)
        Ellipsoid upperCenter_geom_1: socket_frame_connectee_name=.. radii=(0.1 0.5 0.1)
    Body lower: mass=1 mass_center=(0 0 0) inertia=(0 0 0 0 0 0)
      PhysicalOffsetFrame lowerCenter: socket_parent_connectee_name=.. translation=(0 0.5 0)
        Ellipsoid lowerCenter_geom_1: socket_frame_connectee_name=.. radii=(0.1 0.5 0.1)
  JointSet:
    PinJoint hip: socket_parent_frame_connectee_name=ground_offset socket_child_frame_connectee_name=upper_offset
      Coordinate hip_coord_0
      PhysicalOffsetFrame ground_offset: socket_parent_connectee_name=../../ground translation=(0 0 0)
      PhysicalOffsetFrame upper_offset: socket_parent_connectee_name=../../upper translation=(0 1 0)
    PinJoint knee: socket_parent_frame_connectee_name=upper_offset socket_child_frame_connectee_name=lower_offset
      Coordinate knee_coord_0
      PhysicalOffsetFrame upper_offset: socket_parent_connectee_name=../../upper translation=(0 0 0)
      PhysicalOffsetFrame lower_offset: socket_parent_connectee_name=../../lower translation=(0 1 0)
  ControllerSet:
    PrescribedController prescribedcontroller_: actuator_list=calf
      FunctionSet ControlFunctions:
        StepFunction: transition_start_time=0.5 transition_end_time=3 start_value=0.3 end_value=1
  ForceSet:
    Millard2012EquilibriumMuscle calf: min_control=0 max_control=1 max_isometric_force=200 optimal_fiber_length=0.6
        tendon_slack_length=0.55 pennation_angle_at_optimal=0 [radians] minimum_activation=0.01
      PathPoint origin: socket_parent_frame_connectee_name=../../../upper (0 0.8 0)
      PathPoint insertion: socket_parent_frame_connectee_name=../../../lower (0 0.7 0)
      ActiveForceLengthCurve: minimum_value=0
      ForceVelocityCurve: concentric_slope_at_vmax=0 concentric_slope_near_vmax=0.25 isometric_slope=5
          eccentric_slope_at_vmax=0 eccentric_slope_near_vmax=0.15 max_eccentric_velocity_force_multiplier=1.4
      FiberForceLengthCurve
      TendonForceLengthCurve
